// SBML level 2 version 3

model temp()

  // Compartments:
  compartment b = 100;
  compartment a in b = 10;  // 2-D

  // Species:
  species b_X_p_0_y in b = 5000/b; b_X_p_0_y is "@b::X(p~0,y)";
  species b_X_p_1_y in b = 0; b_X_p_1_y is "@b::X(p~1,y)";
  species b_Y_x in b = 500/b; b_Y_x is "@b::Y(x)";
  species b_X_p_0_y_1_Y_x_1 in b = 0; b_X_p_0_y_1_Y_x_1 is "@b::X(p~0,y!1).Y(x!1)";

  // Parameters:
  kon = 10;
  koff = 5;
  kcat = 0.7;
  dephos = 0.5;

  // Assignment rules:
  X_free := 0 + b_X_p_0_y;
  X_p_total := 0 + b_X_p_1_y;
  Xp_free := 0 + b_X_p_1_y;
  XY := 0 + b_X_p_0_y_1_Y_x_1;
  Ytotal := b_Y_x + b_X_p_0_y_1_Y_x_1;
  Xtotal := b_X_p_0_y + b_X_p_1_y + b_X_p_0_y_1_Y_x_1;
  f := 10*20;

  // Reactions:
  R1: b_X_p_0_y + b_Y_x => b_X_p_0_y_1_Y_x_1; kon*b_X_p_0_y*b_Y_x*b;
  R2: b_X_p_1_y => b_X_p_0_y; dephos*b_X_p_1_y*b;
  R3: b_X_p_0_y_1_Y_x_1 => b_X_p_0_y + b_Y_x; koff*b_X_p_0_y_1_Y_x_1*b;
  R4: b_X_p_0_y_1_Y_x_1 => b_X_p_1_y + b_Y_x; kcat*b_X_p_0_y_1_Y_x_1*b;

  // Unit definitions:
  unit substance = item;
end
